// COMSOL Multiphysics 5.4.0.388 model "two_phase_five_layer_pem_mea.mph"
// Two-Phase Model of a PEMFC
// This verification model reproduces the base case model results presented in Free open reference implementation of a two-phase PEM fuel cell Model , Vetter and Schumacher, Computer Physics Communications 234 (2019) 223–234
// Outline of the model tree

Parameters
  L_gdl = 160[um]  // GDL thickness
  L_cl = 10[um]  // Catalyst layer thickness
  L_pem = 25[um]  // Membrane thickness
  sigma_s_gdl = 1250[S/m]  // Electric conductivity, GDL
  sigma_s_cl = 350[S/m]  // Electric conductivity, catalyst layer
  i0_orr_ref = 2.45e-8[A/cm^2]  // Reference exchange current density, oxygen reduction
  i0_hor_ref = 0.27[A/cm^2]  // Reference exchange current density, hydrogen oxidation
  A_a = 1e11[cm^2/m^3]  // Specific surface area, anode
  A_c = 3e11[cm^2/m^3]  // Specific surface area, cathode
  delta_S_orr = -163.3[J/mol/K]  // Entropy change, oxygen reduction
  delta_S_hor = 0.104[J/mol/K]  // Entropy change, hydrogen oxidation
  delta_H = -285.83[kJ/mol]  // Enthaltpy change
  T_cc = 70[degC]  // Temperature at current collectors
  Eeq_hor_init = Eeq_hor(p_H2_init[1/Pa],T_cc[1/K])  // Initial equilibrium potential, hydrogen oxidation
  p_A = 1.5[bar]  // Anode pressure
  p_C = 1.5[bar]  // Cathode pressure
  Eeq_orr_init = Eeq_orr(p_O2_init[1/Pa],T_cc[1/K])  // Initial equilibrium potential, oxygen reduction
  Eeq_cell_init = Eeq_orr_init-Eeq_hor_init  // Initial cell equilibrium voltage
  epsl_cl = 0.3  // Ionomer volume fraction, catalyst layer
  Vm = (1020/1.97)[cm^3/mol]  // Acid equivalent volume of membrane
  E_cell = 1[V]  // Operating cell voltage
  RH_CC = 90[%]  // Relative humidity at current collectors
  p_ref = 1[atm]  // Reference pressure
  p_H2O_cc = RH_CC*p_sat(T_cc)  // Water partial pressure at current collectors
  kappa_gdl = 1.6[W/(m*K)]  // Thermal conductivity, GDL
  kappa_cl = 0.27[W/(m*K)]  // Thermal conductivity, catalyst layer
  kappa_pem = 0.3[W/(m*K)]  // Thermal conductivity, membrane
  D_O2_ref = 0.28[cm^2/s]  // Reference oxygen diffusivity in cathode gas mixture
  epsp_cl = 0.4  // Gas pore volume fraction, catalyst layer
  epsp_gdl = 0.76  // Gas pore volume fraction, GDL
  tort = 1.6  // Tortuosity
  p_O2_cc = 0.21*(1-p_H2O_cc/p_C)*p_C  // Oxygen partial pressure at cathode current collector
  p_H2_cc = (1-p_H2O_cc/p_A)*p_A  // Hydrogen partial pressure at anode current collector
  D_H2_ref = 1.24[cm^2/s]  // Reference hydrogen diffusivity in anode gas mixture
  D_H2O_A_ref = 1.24[cm^2/s]  // Reference water diffusivity in anode gas mixture
  T_ref = 80[degC]  // Reference temperature
  p_O2_init = p_O2_cc  // Oxygen partial pressure, initial value
  p_H2_init = p_H2_cc  // Hydrogen partial pressure, initial value
  Eeq_therm = -delta_H/(2*F_const)  // Thermal equilibrium voltage
  H_ec = 42[kJ/mol]  // Heat of evaporation-condensation
  T_init = T_cc  // Temperature, initial value
  p_H2O_init = p_H2O_cc  // Water partial pressure, initial value
  s_c = 0.12  // Liquid water saturation at cathode current collector
  H_ad = H_ec  // Heat of water adsorption
  D_H2O_C_ref = 0.36[cm^2/s]  // Reference water diffusivity in cathode gas mixture
  Ea_orr = 67[kJ/mol]  // Activation energy, oxygen reduction
  Ea_hor = 16[kJ/mol]  // Activation energy, hydrogen oxidation
  Ea_sigmal = 15[kJ/mol]  // Activation energy, ionomer conductivity
  Ea_lambda = 20[kJ/mol]  // Activation energy, water diffusion in ionomer
  Ea_ad = 20[kJ/mol]  // Activation energy, water adsorbtion
  A_gl = 2[m^2/cm^3]  // Liquid–gas interfacial area density prefactor
  k_abs_gdl = 6.15e-12[m^2]  // Water absorption transfer coefficient prefactor, GDL
  k_abs_cl = 1e-13[m^2]  // Water absorption transfer coefficient prefactor, catalyst layer
  Vw = (18/0.978)[cm^3/mol]  // Molar volume of liquid water
  Mw = 18[g/mol]  // Water molar weight

Functions
  an1: Analytic "Arrhenius Expression" | funcname = Arrh; expr = exp(Ea/R_const*(1/T_ref-1/T)); args = {Ea, T}
  an2: Analytic "Volume Fraction Of Water In Ionomer" | funcname = f; expr = lambda*Vw/(lambda*Vw+Vm); args = lambda
  an3: Analytic "Ionomer Conductivity" | funcname = sigma_l; expr = 116*max(0,f(lambda)-0.06)^1.5*Arrh(Ea_sigmal[mol/J],T); args = {lambda, T}; fununit = S/m
  an5: Analytic "Oxygen Equilibrium Potential" | funcname = Eeq_orr; expr = -(delta_H-T*delta_S_orr)/(2*F_const)+R_const*T/(4*F_const)*log(p_O2/p_ref); args = {p_O2, T}; argunit = 1; fununit = V
  an6: Analytic "Hydrogen Equilibrium Potential" | funcname = Eeq_hor; expr = -T*delta_S_hor/(2*F_const)-R_const*T/(2*F_const)*log(p_H2/p_ref); args = {p_H2, T}; argunit = 1; fununit = V
  an4: Analytic "Fickean Diffusion Coefficient Expression" | funcname = D; expr = (1-s)^3*D_x_ref*(T/T_ref)^1.5*p_ref/p_x; args = {D_x_ref, T, p_x, s}; fununit = m^2/s
  an7: Analytic "Antoine Equation For Saturation Pressure" | funcname = p_sat; expr = exp(23.1963-3816.44/(T-46.13)); args = T; argunit = K; fununit = Pa
  an8: Analytic "Vogel Equation For Water Viscocity" | funcname = mu_H2O; expr = exp(-3.63148+542.05[K]/(T-144.15[K])); args = T; argunit = K; fununit = mPa*s
  an9: Analytic "Water Ionomer Diffusivity" | funcname = D_lambda_ref; expr = (3.842*lambda^3-32.03*lambda^2+67.74*lambda)/(lambda^3-2.115*lambda^2-33.013*lambda+103.37)*1e-6; args = lambda; fununit = cm^2/s
  an10: Analytic "Capillary Pressure" | funcname = p_c; expr = -0.00011*exp(-44.02*(s-0.496))+278.3*exp(8.103*(s-0.496))-191.8; args = s; fununit = Pa
  an11: Analytic "Equilbrium Water Content" | funcname = lambda_eq; expr = 0.043+17.81*RH-39.85*RH^2+36.0*RH^3; args = RH

Variables
  var1 "Variables - Cathode Gas Domains" on selection uni3
    p = p_C  // Pressure
    p_O2 = x_O2*p  // Oxygen partial pressure
    x_H2O = x_H2O_cath  // Water molar fraction
    p_H2O = x_H2O*p  // Water partial pressure
    D_O2 = epsp/tort^2*D(D_O2_ref[s/m^2],T[1/K],p[1/Pa],sat)  // Oxygen diffusion coefficient
    D_H2O = epsp/tort^2*D(D_H2O_C_ref[s/m^2],T[1/K],p[1/Pa],sat)  // Water diffusion coefficient
    x_sat = p_sat(T)/p  // Water saturation pressure
    C = p/(R_const*T)  // Total interstitial gas concentration
  var2 "Variables - Anode Gas Domains" on selection uni4
    p = p_A  // Pressure
    p_H2 = x_H2*p  // Hydrogen partial pressure
    p_H2O = x_H2O*p  // Water partial pressure
    x_H2O = x_H2O_an  // Water molar fraction
    D_H2 = epsp/tort^2*D(D_H2_ref[s/m^2],T[1/K],p[1/Pa],0)  // Hydrogen diffusivity
    D_H2O = epsp/tort^2*D(D_H2O_A_ref[s/m^2],T[1/K],p[1/Pa],0)  // Water diffusivity
    x_sat = p_sat(T)/p  // Water saturation pressure
    C = p/(R_const*T)  // Total interstitial gas concentration
  var3 "Variables - Catalytic Layers" on selection uni1
    epsp = epsp_cl  // Gas pore volume fraction
    k_abs = k_abs_cl  // Water absorption transfer coefficient prefactor
    epsl = epsl_cl  // Ionomer volume fraction
  var4 "Variables - GDLs" on selection sel3
    epsp = epsp_gdl  // Gas pore volume fraction
    k_abs = k_abs_gdl  // Water absorption transfer coefficient prefactor
  var5 "Variables - Liquid Water Domains" on selection uni6
    k_e = 5e-4*sqrt(R_const*T/(2*pi*18[g/mol]))  // Evaporation rate constant
    k_c = 6e-3*sqrt(R_const*T/(2*pi*18[g/mol]))  // Condensation rate constant
    s_red = (sat-s_im)/(1-s_im)  // Reduced saturation
    s_im = s_c  // Immobile liquid water saturation
    gamma_e = k_e*A_gl*s_red  // Water evaporation rate
    gamma_c = k_c*A_gl*(1-s_red)  // Water condensation rate
    S_ec = C*(x_H2O-x_sat)*if(x_H2O<x_sat,gamma_e,gamma_c)  // Evaporation/condensation source
    kappa_perm = (1e-6+s_red^3)*k_abs  // Permeability
    c_s = (kappa_perm/(mu_H2O(T)))*d(p_c(sat),sat)/Vw  // Help variable, saturation (Darcy) equation
  var6 "Variables - Ionomer Domains" on selection uni7
    lambda = c_H2O_pem*Vm  // Ionomer water content
    D_lambda = D_lambda_ref(lambda)*Arrh(Ea_lambda[mol/J], T[1/K])  // Ionomer water diffusion coefficient
    drag_coeff_div_lambda = 2.5/22  // Drag coefficient prefactor
    drag_coeff = lambda*drag_coeff_div_lambda  // Drag coefficient
    mob = drag_coeff_div_lambda*Vm*sigma_l(lambda,T[1/K])/F_const^2  // Ionomer water mobility
    RH = x_H2O/x_sat  // Relative humidity
    k_a = 3.53e-3[cm/s]*f(lambda)*Arrh(Ea_ad[mol/J],T[1/K])  // Adsorption rate
    k_d = 1.42e-2[cm/s]*f(lambda)*Arrh(Ea_ad[mol/J],T[1/K])  // Desorption rate
    S_ad = 1/L_cl/Vm*(lambda_eq(RH)-lambda)*if(lambda<lambda_eq(RH),k_a,k_d)  // Adsorption/desorption source
  var7 "Variables - Membrane" on selection sel4
    epsl = 1

Selections
  sel1: Explicit "Anode Catalytic Layer" on domains 2
  sel2: Explicit "Cathode Catalytic Layer" on domains 4
  sel3: Explicit "Gas Diffusion Layers" on domains 1, 5
  sel4: Explicit "Membrane" on domains 3
  uni1: Union "Catalytic Layers" | entitydim = 1; input = {sel1, sel2}
  sel6: Explicit "Anode Current Collector" on boundaries 1
  sel7: Explicit "Cathode Current Collector" on boundaries 6
  uni2: Union "Current Collectors" | input = {sel6, sel7}; entitydim = 0
  sel8: Explicit "Cathode GDL" on domains 5
  uni3: Union "Cathode Gas Domains" | entitydim = 1; input = {sel2, sel8}
  sel9: Explicit "Anode GDL" on domains 1
  uni4: Union "Anode Gas Domains" | entitydim = 1; input = {sel1, sel9}
  uni5: Union "Gas Domains" | entitydim = 1; input = {uni3, uni4}
  uni6: Union "Liquid Water Domains" | entitydim = 1; input = {sel2, sel8}
  uni7: Union "Ionomer Domains" | entitydim = 1; input = {sel1, sel2, sel4}

Geometry
  geom1 "Geometry 1" (1D, length unit m)
    i1: Interval | specify = len; len = {L_gdl, L_cl, L_pem, L_cl, L_gdl}
    fin: Finalize "Form Union"

Materials
  mat1: Common "Catalytic Layers" on domains 2, 4
    def "Basic"
      electricconductivity = sigma_s_cl
      thermalconductivity = kappa_cl
      density = 1
      heatcapacity = 1
      porosity = epsp_cl
    ElectrolyteConductivity
      sigmal = sigma_l(lambda,T[1/K])
  mat2: Common "Gas Diffusion Layers" on selection sel3
    def "Basic"
      electricconductivity = sigma_s_cl
      thermalconductivity = kappa_gdl
      density = 1
      heatcapacity = 1
      porosity = epsp_gdl
  mat3: Common "Membrane" on selection sel4
    def "Basic"
      thermalconductivity = kappa_pem
      density = 1
      heatcapacity = 1
    ElectrolyteConductivity
      sigmal = sigma_l(lambda,T[1/K])

Physics
  cd: SecondaryCurrentDistribution on all domains
    dependent variable phil
    ShapeProperty.order_electricpotentialionicphase = 2
    ShapeProperty.order_electricpotential = 2
    ice1: Electrolyte "Electrolyte - Membrane" (default)
    ins1: Insulation (default)
    init1: init "Initial Values 1" (default) | phil = -Eeq_hor_init
    init2: init "Initial Values 2 - Cathode side" on domains 4, 5 | phil = -Eeq_hor_init; phis = Eeq_cell_init
    pce1: PorousElectrode "Porous Electrode - Anode" on selection sel1 | epsl = epsl_cl; ElectricCorrModel = NoCorr
      per1: PorousElectrodeReaction (default)
        Eeq = Eeq_hor(p_H2[1/Pa],T[1/K])
        ElectrodeKinetics = ButlerVolmer
        i0 = i0_hor_ref*Arrh(Ea_hor[mol/J],T[1/K])
        alphaa = 1
        alphac = 1
        Av = A_a
        HeatofReactionType = ThermoneutralVoltage
        minput_temperature = T
    pce2: PorousElectrode "Porous Electrode - Cathode" on selection sel2 | epsl = epsl_cl; ElectricCorrModel = NoCorr
      per1: PorousElectrodeReaction (default)
        Eeq = Eeq_orr(p_O2[1/Pa],T[1/K])
        ElectrodeKinetics = ButlerVolmer
        i0 = i0_orr_ref*(p_O2/p_ref)^0.54*Arrh(Ea_orr[mol/J],T[1/K])
        alphaa = 1
        alphac = 1
        Av = A_c
        HeatofReactionType = ThermoneutralVoltage
        Etherm = Eeq_therm
        minput_temperature = T
    ece1: Electrode "Electrode - Gas Diffusion Layers" on selection sel3
    egnd1: ElectricGround on selection sel6
    pot1: ElectricPotential on selection sel7 | phisbnd = E_cell
  ht: HeatTransfer "Heat Transfer in Solids" on all domains
    dependent variable T
    AmbientSettings.LocationInfo = Location:
    AmbientSettings.CoordinatesInfo = Coordinates: 0°N 0°W 0m
    AmbientSettings.ashrae2017LocationInfo = Location:
    AmbientSettings.ashrae2017CoordinatesInfo = Coordinates: 0°N 0°W 0m
    solid1: SolidHeatTransferModel "Solid 1" (default)
    init1: init "Initial Values 1" (default) | Tinit = T_init
    ins1: ThermalInsulation (default)
    temp1: TemperatureBoundary "Temperature 1" on selection uni2 | T0 = T_cc
    hs1: HeatSource "Heat Source - Evaporation-Condensation" on selection uni6 | Q0 = H_ec*S_ec
    hs2: HeatSource "Heat Source - Adsorption" on selection uni1 | Q0 = S_ad*H_ad
  tds: DilutedSpeciesPorousMedia "Transport of Diluted Species in Porous Media - Ionomer Water Transport" on selection uni7
    dependent variable c_H2O_pem
    ShapeProperty.order_concentration = 2
    TransportMechanism.Convection = 0
    TransportMechanism.Migration = 1
    MassConsistentStabilization.glim_mass = 0.1[mol/m^3]/tds4.helem
    pmtp1: PorousMediaTransportProperties (default)
      epsilon_p_mat = userdef
      epsilon_p = epsl
      FluidDiffusivityModelType = UserDefined
      MobilityModel = UserDefined
      ume = mob*epsl^1.5
      z = 1
      V = phil
      DF_c_H2O_pem = D_lambda*epsl^1.5
    nflx1: NoFlux (default)
    init1: init "Initial Values 1" (default) | initc = lambda_eq(RH_CC)/Vm
    reac1: Reactions "Reactions - Adsorption Desorption" on selection uni1 | R_c_H2O_pem = S_ad
    pec1: PorousElectrodeCoupling on selection sel2
      rc1: ReactionCoefficients (default) | iv_src = root.comp1.cd.pce2.per1.iv; nm = 2; Vi = 1
  c: CoefficientFormPDE "Coefficient Form PDE - Saturation (Darcy's law)" on selection uni6
    dependent variable sat
    Units.CustomSourceTermUnit = mol*m^-3/s
    cfeq1: CoefficientFormPDE (default) | c = c_s; f = 0; da = 1
    zflx1: ZeroFluxBoundary "Zero Flux 1" (default)
    init1: init "Initial Values 1" (default) | sat = s_c
    src1: SourceTerm "Source - Water Evaporation-Condensation" on all domains | f = S_ec
    dir1: DirichletBoundary "Dirichlet Boundary Condition 1" on boundaries 6 | r = s_c
  c2: CoefficientFormPDE "Coefficient Form PDE - Cathode Gaseous Species (Diffusion)" on selection uni3
    dependent variable x_cath = {x_O2, x_H2O_cath}
    Units.CustomSourceTermUnit = mol*m^-3/s
    cfeq1: CoefficientFormPDE (default) | c = {D_O2*C, 0, 0, D_H2O*C}; f = {0, 0}; da = {epsp, 0, 0, epsp}
    zflx1: ZeroFluxBoundary "Zero Flux 1" (default)
    init1: init "Initial Values 1" (default) | x_O2 = p_O2_init/p_C; x_H2O_cath = p_H2O_init/p_C
    src1: SourceTerm "Source - Oxygen reduction" on selection sel2 | f = {cd.ivtot/(4*F_const), 0}
    src2: SourceTerm "Source - Water Evaporation-Condensation" on selection uni6 | f = {0, -S_ec}
    src3: SourceTerm "Source - Water Adsorption Desorption" on selection sel2 | f = {0, -S_ad}
    dir1: DirichletBoundary "Dirichlet Boundary Condition 1" on selection sel7 | r = {p_O2_cc/p_C, p_H2O_cc/p_C}
  c3: CoefficientFormPDE "Coefficient Form PDE - Anode Gaseous Species (Diffusion)" on selection uni4
    dependent variable x_an = {x_H2, x_H2O_an}
    Units.CustomSourceTermUnit = mol*m^-3/s
    cfeq1: CoefficientFormPDE (default) | c = {D_H2*C, 0, 0, D_H2O*C}; f = {0, 0}; da = {epsp, 0, 0, epsp}
    zflx1: ZeroFluxBoundary "Zero Flux 1" (default)
    init1: init "Initial Values 1" (default) | x_H2 = p_H2_init/p_A; x_H2O_an = p_H2O_init/p_A
    src1: SourceTerm "Source - Hydrogen oxidation" on selection sel1 | f = {-cd.ivtot/(2*F_const), 0}
    src3: SourceTerm "Source - Water Adsorption Desorption" on selection sel1 | f = {0, -S_ad}
    dir1: DirichletBoundary "Dirichlet Boundary Condition 1" on selection sel6 | r = {p_H2_cc/p_A, p_H2O_cc/p_A}

Multiphysics
  ech1: ElectrochemicalHeating | ECHeat_physics = cd; Heat_physics = ht

Mesh
  mesh1 "Mesh 1"
    size: MeshSizeDefault | hauto = 1
    edg1: Edge on remaining entities
      dis1: Distribution on selection uni7 | numelem = 100

Studies
  std1 "Study 1"
    stat: Stationary | useparam = on; pname = E_cell; plistarr = range(1,-0.1,0); punit = V

Solver configurations
  sol1 "Solution 1" (study std1)
    v1: Variables "Dependent Variables 1" | scalemethod = init
    s1: Stationary "Stationary Solver 1" | stol = 1e-6
      p1: Parametric | pname = E_cell; plistarr = range(1,-0.1,0); punit = V
      fc1: FullyCoupled | linsolver = d1; initstep = 0.01; minstep = 1.0E-6; maxiter = 50
      d1: Direct

Datasets
  dset1: Solution | solution = sol1

Derived values
  int1: IntLine "Line Integration - Membrane Resistance" on selection sel4
    data = dset1
    table = tbl1
    expr = 1/(sigma_l(lambda,T[1/K])*epsl^1.5)
    unit = Ω*m^2
    descr = Resistance
  av1: AvLine "Line Average - Average Temperature" on all domains
    data = dset1
    table = tbl2
    expr = T
    unit = degC
    descr = Temperature
  int2: IntLine "Line Integration - Mean Water Ionomer Content" on selection uni7
    data = dset1
    table = tbl3
    expr = epsl*lambda/(L_cl*2*epsl_cl+L_pem)
    unit = 1
    descr = Ionomer content

Tables
  tbl1: Table
    // Line Integration 1 (1/cd.sigmalxx)
    E_cell (V) | Resistance (Ω*m^2)
    0.6 | 8.03837e-06
  tbl2: Table
    // Line Average 1 (T)
    E_cell (V) | Temperature (degC)
    0.6 | 70.3528
  tbl3: Table
    // Line Integration 2 (epsl*lambda/(L_cl*2*epsl_cl+L_pem))
    E_cell (V) | Ionomer content (1)
    0.6 | 6.77396

Plots
  pg3: PlotGroup1D "Polarization and Power"
    data = dset1
    xlabel = Current Density (A/cm<sup>2</sup>)
    yseclabel = Power denisty (W/cm<sup>2</sup>)
    ptgr1: PointGraph on boundaries 6
      expr = phis
      descr = Electric potential
      xdata = expr
      xdataexpr = cd.nIs/1[A/cm^2]
      autopoint = off
    ptgr2: PointGraph on boundaries 6
      expr = phis*cd.nIs
      unit = W/cm^2
      descr = Power denisty
      xdata = expr
      xdataexpr = cd.nIs/1[A/cm^2]
      autopoint = off
  pg2: PlotGroup1D "Electrode Potential Vs. Ground" | data = dset1; typeintitle = off; unitintitle = off
    lngr1: LineGraph on all domains | expr = phis; descr = Electric potential; xdata = expr; xdataexpr = x
  pg1: PlotGroup1D "Electrolyte Potential" | data = dset1; typeintitle = off; unitintitle = off
    lngr1: LineGraph on all domains | expr = phil; xdata = expr; xdataexpr = x
  pg4: PlotGroup1D "Temperature" | data = dset1; typeintitle = off; unitintitle = off
    lngr1: LineGraph on all domains | expr = T; unit = degC; descr = Temperature; xdata = expr; xdataexpr = x
  pg9: PlotGroup1D "Lambda (Ionomer Water Content)"
    data = dset1
    typeintitle = off
    unitintitle = off
    ylabel = \lambda (1)
    lngr1: LineGraph on selection uni7
      expr = lambda
      unit = 1
      descr = Ionomer water content
      xdata = expr
      xdataexpr = x
  pg7: PlotGroup1D "x_H2O" | data = dset1; typeintitle = off; unitintitle = off; ylabel = x<sub>H2O</sub> (1)
    lngr1: LineGraph on all domains | expr = x_H2O; unit = 1; descr = Water molar fraction; xdata = expr; xdataexpr = x
  pg6: PlotGroup1D "x_H2" | data = dset1; title = Hydrogen molar fraction; ylabel = x<sub>H2</sub> (1)
    lngr1: LineGraph on selection uni4
      expr = x_H2
      unit = 1
      descr = Dependent variable x_H2
      xdata = expr
      xdataexpr = x
  pg5: PlotGroup1D "x_O2" | data = dset1; title = Oxygen molar fraction; ylabel = x<sub>O2</sub> (1)
    lngr1: LineGraph on selection uni3
      expr = x_O2
      unit = 1
      descr = Dependent variable x_O2
      xdata = expr
      xdataexpr = x
  pg8: PlotGroup1D "Saturation (Liquid Water Fraction)"
    data = dset1
    title = Saturation (Liquid Water Fraction)
    ylabel = s (1)
    lngr1: LineGraph on domains 1-5 | expr = sat; unit = 1; descr = Dependent variable sat; xdata = expr; xdataexpr = x
  pg10: PlotGroup1D "Electrode Current Density"
    data = dset1
    title = Electrode current density
    ylabel = Electrode current density (A/cm<sup>2</sup>)
    lngr1: LineGraph on all domains
      expr = cd.Isx
      unit = A/cm^2
      descr = Electrode current density vector, x component
      xdata = expr
      xdataexpr = x
  pg11: PlotGroup1D "Electrolyte Current Density" | data = dset1; descriptionintitle = off; unitintitle = off
    lngr1: LineGraph on all domains
      expr = cd.Ilx
      unit = A/cm^2
      descr = Electrolyte current density
      xdata = expr
      xdataexpr = x
  pg12: PlotGroup1D "Heat Flux" | data = dset1; typeintitle = off; unitintitle = off
    lngr1: LineGraph on all domains
      expr = ht.tfluxx
      unit = W/cm^2
      descr = Total heat flux
      xdata = expr
      xdataexpr = x
  pg13: PlotGroup1D "Water Ionomer Flux" | data = dset1; typeintitle = off; unitintitle = off
    lngr1: LineGraph on all domains
      expr = tds.tflux_c_H2O_pemx
      unit = mol/(m^2*s)
      descr = Water ionomer flux
      xdata = expr
      xdataexpr = x
  pg14: PlotGroup1D "Water Gas Flux" | data = dset1; typeintitle = off; unitintitle = off
    lngr1: LineGraph on all domains
      expr = -D_H2O*d(x_H2O,x)*C
      unit = umol/(cm^2*s)
      descr = Water gas flux
      xdata = expr
      xdataexpr = x
  pg15: PlotGroup1D "Hydrogen Gas Flux" | data = dset1; typeintitle = off; unitintitle = off
    lngr1: LineGraph on all domains
      expr = -D_H2*d(x_H2,x)*C
      unit = umol/(cm^2*s)
      descr = Hydrogen gas flux
      xdata = expr
      xdataexpr = x
  pg16: PlotGroup1D "Oxygen Gas Flux" | data = dset1; typeintitle = off; unitintitle = off
    lngr1: LineGraph on all domains
      expr = -D_O2*d(x_O2,x)*C
      unit = umol/(cm^2*s)
      descr = Oxygen gas flux
      xdata = expr
      xdataexpr = x
  pg17: PlotGroup1D "Liquid Water Flux" | data = dset1; typeintitle = off; unitintitle = off
    lngr1: LineGraph on all domains
      expr = -c_s*satx
      unit = umol/(cm^2*s)
      descr = Liquid water flux
      xdata = expr
      xdataexpr = x